Prey_0 := 10
Predator_0 := 10
k := .1
k_2 := .02
k_3 := .09
D(t, y) := [k*y[0] - k_2*y[0]*y[1]; k_2*y[0]*y[1] - k_3*y[1]]
n := [Prey_0; Predator_0]
N := 1000
t_max := 250
s := rkfixed(n, 0, t_max, N, D)
t := s[:, 0]
Prey := s[:, 1]
Predator := s[:, 2]
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