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x[0] := 1/7
x[0] := 0.5
f[0] := 0.501
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K := 2.0
N := 40
y1(x) := 2*x
n := 0, 1 .. N
y2(x) := x
x[n + 1] := mod(K*x[n], 1)
y3(x) := 2*x - 1
f[n + 1] := mod(K*f[n], 1)
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M := 9
p := 0, 1 .. M
Delta_xn_fn(p) := 2^p*(x[0] - f[0])
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z := 0, 0.1 .. 1.5
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