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N := 5*10^3
m := 12
2^m = 4096
N := 2^m - 1
N = 4095
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λ := 0.401
a := 0.601
ω := 1.201
Delta := (ω^2 - 1)/(ω*λ)
Delta = 0.918605
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v := [0.1; 0]
Eps := a/(2*ω*λ^(3/2))
Eps = 0.985337
D0(t, x) := [x[1]; -x[0] + (λ - x[0]^2)*x[1]]
D(t, x) := [x[1]; -x[0] + (λ - x[0]^2)*x[1] + a*sin(ω*t)]
Eps/Delta = 1.07265
Point := [Delta, Eps]
U0 := Rkadapt(v, 0, 200, N, D0)
U := Rkadapt(v, 0, 200, N, D)
Point = [0.918605, 0.985337]
ε(Δ) := |Δ|
Δ := -1.2, -1.19 .. 1.2
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2*π/(197.51 - 192.28) = 1.20137
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U(x) := Delta*x + Eps*cos(x)
C0 := -1/sqrt(Eps^2 - Delta^2)*ln((Eps - sqrt(Eps^2 - Delta^2))/(Eps + sqrt(Eps^2 - Delta^2)))
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R := sqrt(Eps^2 - Delta^2)
ψ(t) := exp(R*(t + C0))
φ(t) := 2*atan(1/Delta*(Eps + R*(ψ(t) + 1)/(ψ(t) - 1)))
φlim := 2*atan(1/Delta*(Eps + R))
t := 0, 0.01 .. 100
φlim = 1.94094
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x := 0.0003
root(d/dx(U(x)), x) = 1.20065
φD(x) := d/dx(U(x))
ω := 2/λ*root(d/dx(U(x)), x)
φD(φlim) = 1.82306e-15
ω = 5.98828
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λ := 0.401
a := 0.401
ω := 1.201
Delta := (ω^2 - 1)/(ω*λ)
Delta = 0.918605
v := [0.1; 0]
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Eps := a/(2*ω*λ^(3/2))
Eps = 0.657438
D(t, x) := [x[1]; -x[0] + (λ - x[0]^2)*x[1] + a*sin(ω*t)]
D0(t, x) := [x[1]; -x[0] + (λ - x[0]^2)*x[1]]
Eps/Delta = 0.715692
Point := [Delta, Eps]
U := Rkadapt(v, 0, 200, N, D)
U0 := Rkadapt(v, 0, 200, N, D0)
Point = [0.918605, 0.657438]
ε(Δ) := |Δ|
Δ := -1, -0.99 .. 1
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Delta1 := 0.21
Eps1 := 0.2
U(x) := Delta*x + Eps*cos(x)
t(φ) := integral(1/(-Delta + Eps*sin(ψ)), ψ = 0 .. φ)
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φ := -50, -49.99 .. 0
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