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λ := -0.152
μ := 1
λC := -μ^2/8
λC = -0.125
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v := [0.5; 0.0]
v1 := [-1.5; 0.0]
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D(t, x) := [x[1]; -x[0] + (λ + μ*x[0]^2 - x[0]^4)*x[1]]
D1(t, x) := [x[1]; -x[0] + (λ + μ*x[0]^2 - x[0]^4)*x[1]]
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t0 := 0
t1 := 1000
M := 20000
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U := rkfixed(v, t0, t1, M, D)
U1 := rkfixed(v1, t0, t1, M, D1)
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λ0 := 0.5
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a01 := 0.6
a02 := 0.8
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ast := sqrt(λ0)
a1(t) := sqrt(λ0/(1 - (1 - λ0/a01^2)*exp(-λ0*t)))
a2(t) := sqrt(λ0/(1 - (1 - λ0/a02^2)*exp(-λ0*t)))
t := 0, 0.01 .. 15
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λ := -0.11
μ := 1
λC := -μ^2/8
λC = -0.125
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v := [0.801; 0.0]
v1 := [2.01; 0.0]
v2 := [0.73; 0.0]
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D(t, x) := [x[1]; -x[0] + (λ + μ*x[0]^2 - x[0]^4)*x[1]]
D1(t, x) := [x[1]; -x[0] + (λ + μ*x[0]^2 - x[0]^4)*x[1]]
# Залежність квадрата амплітуди коливань від біфуркаційних параметра λ
D1(t, x) := [x[1]; -x[0] + (λ + μ*x[0]^2 - x[0]^4)*x[1]]
t0 := 0.2
t1 := 1000
M := 20000
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rst(λ) := (μ + sqrt(μ^2 + 8*λ))/4
rin(λ) := (μ - sqrt(μ^2 + 8*λ))/4
U := rkfixed(v, t0, t1, M, D)
λ := -0.2, -0.199 .. 0.2
U1 := rkfixed(v1, t0, t1, M, D1)
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U2 := rkfixed(v2, t0, t1, M, D1)
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λ := 0.11
μ := 1
λC := -μ^2/8
λC = -0.125
v := [0.1; 0.0]
v1 := [2; 0.0]
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D(t, x) := [x[1]; -x[0] + (λ + μ*x[0]^2 - x[0]^4)*x[1]]
D1(t, x) := [x[1]; -x[0] + (λ + μ*x[0]^2 - x[0]^4)*x[1]]
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t0 := 0
t1 := 1000
M := 20000
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U := rkfixed(v, t0, t1, M, D)
U1 := rkfixed(v1, t0, t1, M, D1)
t0 := 0.2
t1 := 1000
M := 20000
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