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a := -1
b := 0.1
c := a + 1i*b
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v := transpose([c, -1, 1])
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Z := polyroots(v)
Z = [-0.618927 + 0.0446857i; 1.61893 - 0.0446857i]
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p(y) := |2*y|
p(Z[0]) = 1.24108
p(Z[1]) = 3.23909
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col(x) :=
    r1 ← rnd(1)
    return 0 if 0 ≤ r1 ≤ 0.5
    return 1 if 0.5 ≤ r1
M := [1; -1]
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z := Z[1]
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N := 150000
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A :=
    A[0, 0] ← Re(z)
    A[0, 1] ← Im(z)
    for k ∈ 1 .. N
        n ← col(k)
        x ← M[n]*sqrt((A[k - 1, 0] - a)/2 + 1/2*sqrt((A[k - 1, 0] - a)^2 + (A[k - 1, 1] - b)^2))
        y ← (A[k - 1, 1] - b)/(2*x)
        A[k, 0] ← x
        A[k, 1] ← y
    A
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k := 1 .. N
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