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m := 12
2^m = 4096
M := 2^m - 1
M = 4095  # число точек интервала, в который находится решение. Число строк матрицы Z равно M+1
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α := 0.0
β := -10
γ := -2.0
t0 := 0
t1 := 0.6
y1(t) := sqrt(-β)*t
U(x) := β*x^2/2 + γ*x^4/4
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v := [-0.36, 0.36, 0, 0, 0.1, -0.1, 0.25393, -0.25393; 1.25, -1.25, -0.5, 0.5, 0, 0, -0.74086, 0.74086]
y2(t) := -sqrt(-β)*t
x := -4, -3.999 .. 4
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D(t, x) := [x[1]; -α*x[1] - β*x[0] - γ*x[0]^3]
U :=
    Z1 ← rkfixed(v[:, 0], t0, t1, M, D)
    for k ∈ 1 .. cols(v) - 1
        Z2 ← rkfixed(v[:, k], t0, t1, M, D)
        Z1 ← stack(Z1, Z2)
    Z1
t := -t1, -t1*(1 - 0.001) .. t1
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α := 0.0
β := 10
γ := -2.0
t0 := 0
t1 := 10.0
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U(x) := β*x^2/2 + γ*x^4/4
x1 := -sqrt(-β/γ)
x1 = -2.23607
x := -4, -3.999 .. 4
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x2 := -sqrt(-β/γ)
x2 = -2.23607
v := [0, 0, 0, 0, 1.8, -1.8, -2.23; -1.5, 1.5, -0.5, 0.5, 0, 0, 0]
D(t, x) := [x[1]; -α*x[1] - β*x[0] - γ*x[0]^3]
U :=
    Z1 ← rkfixed(v[:, 0], t0, t1, M, D)
    for k ∈ 1 .. cols(v) - 1
        Z2 ← rkfixed(v[:, k], t0, t1, M, D)
        Z1 ← stack(Z1, Z2)
    Z1
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v1 := [
    -2.25, -3.1516, 2.25, 3.1516, 3.05, -3, -2.23, 3.15, -3.15, 0, -1.5487;
    0, 4.9323, 0, -4.9323, -4.8, 4.8, 0, -4.8068, 4.8068, -5.434, 3.7159
]
t11 := 1.2
D1(t, x) := [x[1]; -α*x[1] - β*x[0] - γ*x[0]^3]
U1 :=
    Z11 ← rkfixed(v1[:, 0], t0, t11, M, D1)
    for k ∈ 1 .. cols(v1) - 1
        Z21 ← rkfixed(v1[:, k], t0, t11, M, D1)
        Z11 ← stack(Z11, Z21)
    Z11
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α := 0.0
β := 10
γ := 2.0
t0 := 0
t1 := 10.0
U(x) := β*x^2/2 + γ*x^4/4
x1 := -sqrt(-β/γ)
x1 = -2.23607i
x := -4, -3.999 .. 4
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x2 := -sqrt(-β/γ)
x2 = -2.23607i
v := [5.0, 4.0, 3, 2, 1; 0, 0.0, 0, 0, 0]
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D(t, x) := [x[1]; -α*x[1] - β*x[0] - γ*x[0]^3]
U :=
    Z1 ← rkfixed(v[:, 0], t0, t1, M, D)
    for k ∈ 1 .. cols(v) - 1
        Z2 ← rkfixed(v[:, k], t0, t1, M, D)
        Z1 ← stack(Z1, Z2)
    Z1
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α := 0.0
β := -10
γ := 2.0
t0 := 0
t1 := 10.0
U(x) := β*x^2/2 + γ*x^4/4
x := -4, -3.999 .. 4
x1 := -sqrt(-β/γ)
x1 = -2.23607
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x2 := -sqrt(-β/γ)
x2 = -2.23607
v := [-2.0, -1.5, -0.5, -0.0001, 0.0001, 0.5, 1.5, 2; 0, 0, 0, 0, 0, 0, 0, 0]
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D(t, x) := [x[1]; -α*x[1] - β*x[0] - γ*x[0]^3]
U :=
    Z1 ← rkfixed(v[:, 0], t0, t1, M, D)
    for k ∈ 1 .. cols(v) - 1
        Z2 ← rkfixed(v[:, k], t0, t1, M, D)
        Z1 ← stack(Z1, Z2)
    Z1
v1 := [0, 0; 1.5, 3.5]
D1(t, x) := [x[1]; -α*x[1] - β*x[0] - γ*x[0]^3]
t11 := 10
U1 :=
    Z11 ← rkfixed(v1[:, 0], t0, t11, M, D1)
    for k ∈ 1 .. cols(v1) - 1
        Z21 ← rkfixed(v1[:, k], t0, t11, M, D1)
        Z11 ← stack(Z11, Z21)
    Z11
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# Рух поза сепаратрісной петлі - сверхнелінейні коливання.
# Траєкторії, що показані синім кольором.
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α := 0.1
β := 1
γ := 0.04
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ω0 := sqrt(β)
ω := 1.19
B := 0.5
F := 3*γ*B^2/(4*α^3*ω0^3)
F = 7.5
Δ := 2*(ω - ω0)/α
Δ = 3.8
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ΔP1(Λ) := Λ + sqrt(F/Λ - 1)
ΔM1(Λ) := Λ - sqrt(F/Λ - 1)
Λ := 0.1, 0.101 .. 10
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Δ = 3.8
F = 7.5
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Λ := 0.5
Λ3 := root(Λ*((Λ - Δ)^2 + 1) - F, Λ)
Λ3 = 0.711764
A3 := sqrt(Λ3*4*α*ω0/(3*γ))
A3 = 1.54031
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Λ := 2.0
Λ2 := root(Λ*((Λ - Δ)^2 + 1) - F, Λ)
Λ2 = 2.29314
A2 := sqrt(Λ2*4*α*ω0/(3*γ))
A2 = 2.76474
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Λ := 4
Λ1 := root(Λ*((Λ - Δ)^2 + 1) - F, Λ)
Λ1 = 4.59509
A1 := sqrt(Λ1*4*α*ω0/(3*γ))
t0 := 0
t1 := 100.0
A1 = 3.91369
x := [0.5; 0.0]
D(t, x) := [x[1]; -α*x[1] - β*x[0] - γ*x[0]^3 + B*cos(ω*t)]
Z1 := Rkadapt(x, t0, t1, M, D)
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x := [2.0; 0.0]
D(t, x) := [x[1]; -α*x[1] - β*x[0] - γ*x[0]^3 + B*cos(ω*t)]
Z2 := Rkadapt(x, t0, t1, M, D)
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x := [3.5; 0.0]
D(t, x) := [x[1]; -α*x[1] - β*x[0] - γ*x[0]^3 + B*cos(ω*t)]
Z3 := Rkadapt(x, t0, t1, M, D)
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