# ЛАБОРАТОРНА РОБОТА 1
# Модель Лоттки-Вольтерри "хижак-жертва". За умовою задачі слід розглянути поведінку системи у відповідних випадках:
# 1. Види не вазємодіють
γ_1 := 0.0
# Початкова кількість (антилопи/леви):
x := [30; 100]
# Коефіцієнт міжвидової взаємодії (антилопи/леви):
γ_2 := 0.0
# Коефіцієнт прирісту антилоп:
ε_1 := 2
# Коефіцієнт смертності левів:
ε_2 := 0.02
N := 3000
t_max := 150
D(t, x) := [x[0]*(ε_1 - γ_1*x[1]); -x[1]*(ε_2 - γ_2*x[0])]
z := Rkadapt(x, 0, t_max, N, D)
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# З графіку видно, що у ситуації, коли види не взаємодіють, маємо різкий зріст популяції антилоп, та згасання популяції левів через незтачу їжі.
# 2. Види вазємодіють за встановленими коефіцієнтами
γ_1 := 0.01
# Коефіцієнт міжвидової взаємодії (антилопи/леви):
γ_2 := 0.001
D(t, x) := [x[0]*(ε_1 - γ_1*x[1]); -x[1]*(ε_2 - γ_2*x[0])]
z := Rkadapt(x, 0, t_max, N, D)
# Стан спокою системи:
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X1A := ε_1/γ_1
X1A = 200
X0A := ε_2/γ_2
X0A = 20
X0V := [X0A, X1A]
X0V[0, 0] = 20
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# Фазовий портрет системи:
# Як видно, при даних значеннях параметрів спостерігається стирмке поширення популяції жертв, а зі здвигом по фазі - хижаків, що, у свою чергу, спричиняє різкий занепад популяції антилоп до нульової позначки, після чого популяція левів також починає спадати до своєї почткової відмітки у 100 голів. Після цього процес повторюється
# Система має особливу точку типу центр у т. (20, 200)
