# ЛАБОРАТОРНА РОБОТА 2
# Диференційне рівняння вільних коливань лінійного осцилятора з урахуванням загасання. Задамо змінні:
# Циклічна частота системи:
ω := 2
# Коефіцієнт загасання:
ν := 0.2
# Вектор початкових умов (зміщення/швидкість):
x := [10; 100]
# Обчислюємо:
# Матриця правих частин:
D(t, x) := [x[1]; -2*ν*x[1] - ω^2*x[0]]
# Матриця розв'язків:
Z := Rkadapt(x, 0, 20, 3000, D)
# Особлива точка
OT := [0; 0]
# Особлива точка осциллятора є центром у випадку незгасаючих коливань.
ν := 0
D(t, x) := [x[1]; -2*ν*x[1] - ω^2*x[0]]
Z := Rkadapt(x, 0, 20, 3000, D)
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# Особлива точка осциллятора є вузлом при загасанні більшому, ніж циклічна частота системи.
ν > ω
# При
ν > 0  # ОТ - стійкий вузол:
ω := 1
ν := 1.1
D(t, x) := [x[1]; -2*ν*x[1] - ω^2*x[0]]
Z := Rkadapt(x, 0, 20, 3000, D)
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# При
ν < 0  # ОТ - нестійкий вузол:
ω := -2
ν := -1
D(t, x) := [x[1]; -2*ν*x[1] - ω^2*x[0]]
Z := Rkadapt(x, 0, 20, 3000, D)
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# Особлива точка осциллятора є фокусом при загасанні меншому, ніж циклічна частота системи.
ν < ω
# При
ν > 0  # ОТ - стійкий фокус:
ω := 10
ν := 1
D(t, x) := [x[1]; -2*ν*x[1] - ω^2*x[0]]
Z := Rkadapt(x, 0, 20, 3000, D)
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# При
ν < 0  # ОТ - нестійкий вузол:
ω := -10
ν := -0.5
D(t, x) := [x[1]; -2*ν*x[1] - ω^2*x[0]]
Z := Rkadapt(x, 0, 20, 3000, D)
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