m := 14
2^m = 16384
N := 2^m - 1
N = 16383
tmax := 50
ω0 := 1
ε := 0.2
n0 := 3
ω := 2*ω0/n0
δ(ω) := ω0 - n0*ω/2
ω = 0.666667
δ(ω) = 0
λ1 := sqrt((ε*ω0/4)^2 - δ(ω)^2)
λ2 := -sqrt((ε*ω0/4)^2 - δ(ω)^2)
νth(ω) := sqrt((ε*ω0/4)^2 - δ(ω)^2)
λ1 = 0.05
λ2 = -0.05
νth(ω) = 0.05
ν := 0.5
εmin := 4*ν/ω0
εmin = 2
ε = 0.2
ε0(p) := 4*|1 - n0/(2*p)|
ν0 := 0.01
x := [1; 0]
ε1(p) := 4*sqrt((ν0/ω0)^2 + (1 - n0/(2*p))^2)
D(t, x) := [x[1]; -2*ν*x[1] - ω0^2*(1 + ε*cos(ω*t))*x[0]]
p := 0, 0.001 .. 2
Z := Rkadapt(x, 0, tmax, N, D)
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