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N := 200
n := 0, 1 .. N
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λ := -0.3
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x_stat := 2*sqrt(λ)
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x[0] := 0.2
z[0] := 0.5
x[n] := 2*sqrt(λ)*x[0]*exp(π*n*λ)/sqrt(4*λ + x[0]^2*(exp(2*π*n*λ) - 1))
x[n + 1] := 2*sqrt(λ)*x[0]*exp(π*(n + 1)*λ)/sqrt(4*λ + x[0]^2*(exp(2*π*(n + 1)*λ) - 1))
z[n] := 2*sqrt(λ)*z[0]*exp(π*n*λ)/sqrt(4*λ + z[0]^2*(exp(2*π*n*λ) - 1))
z[n + 1] := 2*sqrt(λ)*z[0]*exp(π*(n + 1)*λ)/sqrt(4*λ + z[0]^2*(exp(2*π*(n + 1)*λ) - 1))
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x[n + 1] := x[n]*exp(π*λ)/sqrt(1 + x[n]^2/(4*λ)*(exp(2*π*λ) - 1))
z[n + 1] := z[n]*exp(π*λ)/sqrt(1 + z[n]^2/(4*λ)*(exp(2*π*λ) - 1))
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y[n] := x[n]
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z[0] := 2
λ := 0.3
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x_stat := 2*sqrt(λ)
x_stat = 1.09545
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x[0] := 0.2
x[n] := 2*sqrt(λ)*x[0]*exp(π*n*λ)/sqrt(4*λ + x[0]^2*(exp(2*π*n*λ) - 1))
x[n + 1] := 2*sqrt(λ)*x[0]*exp(π*(n + 1)*λ)/sqrt(4*λ + x[0]^2*(exp(2*π*(n + 1)*λ) - 1))
z[n] := 2*sqrt(λ)*z[0]*exp(π*n*λ)/sqrt(4*λ + z[0]^2*(exp(2*π*n*λ) - 1))
z[n + 1] := 2*sqrt(λ)*z[0]*exp(π*(n + 1)*λ)/sqrt(4*λ + z[0]^2*(exp(2*π*(n + 1)*λ) - 1))
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x[n + 1] := x[n]*exp(π*λ)/sqrt(1 + x[n]^2/(4*λ)*(exp(2*π*λ) - 1))
z[n + 1] := z[n]*exp(π*λ)/sqrt(1 + z[n]^2/(4*λ)*(exp(2*π*λ) - 1))
y[n] := x[n]
g[n] := z[n]
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