# ОСОБЫЕ ТОЧКИ
# N - Число точек (не считая начальной точки), в которых ищется приближенное решение. При помощи этого аргумента определяется число строк (1 + N) в матрице, возвращаемой функцией rkfixed.
M := 10^4
# ОСОБАЯ ТОЧКА ТИПА ЦЕНТР
ω := 0.2
ν := 0.0
t0 := 0
t1 := 50
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cols(v) =  # error: Эта переменная не определена.
v := [-100, 100, -100, -100, 100, -100, -100, 100, 100, 100; 30, -30, 20, 25, -25, 10, 19, -20, -19, -10]
λ[1] := -ν + sqrt(ν^2 - ω^2)
D(t, x) := [x[1]; ω^2*x[0]]
last(transpose(v)[:, 1]) = 9
λ[2] := -ν - sqrt(ν^2 - ω^2)
x := -200, -199 .. 100
y1(x) := ω*x
U :=
    Z1 ← rkfixed(v[:, 0], t0, t1, M, D)
    for k ∈ 1 .. cols(v) - 1
        Z2 ← rkfixed(v[:, k], t0, t1, M, D)
        Z1 ← stack(Z1, Z2)
    Z1
y2(x) := -ω*x
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