# УРАВНЕНИЕ  МАТЬЕ
m := 14
2^m = 16384
N := 2^m - 1
N = 16383
tmax := 50
# Основной резонанс n0=1:
ω0 := 1  # - собственная частота колебаний
ε := 0.2  # - глубина модуляции
n0 := 1  # - номер резонанса
ω := 2*ω0/n0  # - частота модуляции
δ(ω) := ω0 - n0*ω/2  # - малый параметр
ω = 2
δ(ω) = 0
# Корни характеристического уравнения
# для системы (56) из Лекции 4.
# Граница основного резонанса в отсутствие потерь:
n0 := 1
ε0(p) := 4*|1 - n0/(2*p)|
λ1 := sqrt((ε*ω0/4)^2 - δ(ω)^2)
λ2 := -sqrt((ε*ω0/4)^2 - δ(ω)^2)
# Здесь параметр "p" равен отношению собственной частоты осциллятора ω0 к частоте модуляции параметра ω (смотри рис. 3 Лекции 4).
λ1 = 0.05
λ2 = -0.05
# В отсутствие потерь, когда ν равно нулю неустойчивость возникнет, если корни λ1 и λ2 - действительные.
# Граница основного резонанса при наличии потерь:
# Для этого необходимо соответствующим образом подобрать следующие параметры системы:
ω0, ω, ε
ω0 := 1
ν0 := 0.05  # Для ω0=1 и ν=0.05 получаем εmin=0.2
# Если потери отличны от нуля, то неустойчивость возникнет, если частота этих потерь будет меньше, чем их пороговая величина равная νth(ω) (то есть ν < νth):
ε1(p) := 4*sqrt((ν0/ω0)^2 + (1 - n0/(2*p))^2)
νth(ω) := sqrt((ε*ω0/4)^2 - δ(ω)^2)
p := 0, 0.001 .. 2
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νth(ω) = 0.05
# Чтобы возникла неустойчивость выбираем значение частоты потерь равной, например,такому значению:
ν := 0.01
# Учет затухания приводит к тому, что зона неустойчивости "отрывается" от оси абсцисс и появляется пороговое значение параметра модуляции ε, меньше которого неустойчивость не может возникнуть вообще (смотри рис. 1 в программе и рис. 3 в Лекции 4). Это пороговое значение равно εmin=4ν/ω0. Поэтому, для возникновения неусточивости необходимо так подобрать параметры системы, чтобы частота релаксации ν была меньше порогового значения νth и величина глубины модуляции ε была больше минимального значения εmin (то есть εmin<ε<1).
# Рис. 1.
# Основная зона параметрической неустойчивости уравнения Матье при отсутствии (зависимость Ε0(p)) и при наличии (зависимость Ε1(p)) потерь.
# Убеждаемся, что выбранное значение ε попадает в указанный выше интервал:
εmin := 4*ν/ω0
εmin = 0.04
ε = 0.2
x := [1; 0]
D(t, x) := [x[1]; -2*ν*x[1] - ω0^2*(1 + ε*cos(ω*t))*x[0]]
Z := Rkadapt(x, 0, tmax, N, D)
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# Режим параметрической регенерации.Основной резонанс n0=1:
n0 := 1
# Для заданной глубины модуляции ε частоту релаксации ν выбираем равной пороговому значению νth. В результате устанавливаюся стационарные колебания (т.е. колебания, амплитуда которых не растет со временем).
