# СИЛОВОЙ РЕЗОНАНС В ЛИНЕЙНОЙ СИСТЕМЕ
m := 14
2^m = 16384
N := 2^m - 1
N = 16383  # число точек интервала, в которых находится решение. Число строк матрицы Z равно N+1
# ТОЧНЫЙ РЕЗОНАНС
ω := 2.0
f := 4.0
ν := 0.01
x := [0.0; 0.0]
ares := f/sqrt((1 - ω^2)^2 + 4*ω^2*ν^2)
D(t, x) := [x[1]; (-x[0] + (f*sin(ω*t) - 2*ν*x[1]))]
tmax := 200
ares = 1.33321
# Время установления колебаний:
tstat := 1/ν
tstat = 100
Z := Rkadapt(x, 0, tmax, N, D)
F(t) := f*t/(2*ω)
Period := 2*π/ω
a0 := 1
a1 := -1
T := Z[:, 0]  # arrays of the time;
n := 0 .. N
x01(x) := a0*sin(x) + a1*sin(ω*x)
Period = 3.14159
Z[:, 1], Z[:, 2]  # arrays  # of  # the  # coord  # and velocity;
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# [component: inputs (Z[:, 2], Z[:, 1], Z[:, 0])]
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# График разброса
