# Модель Лоттки-Вольтерры
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ε[1] := 2
ε[2] := 0.4
γ[1] := 0.0
γ[2] := 0.00
tmax := 10
N := 1000
# rkfixed(y, x1, x2, intvls, D)
# Возвращает матрицу значений решений дифференциального уравнения, заданного производными в D и начальными условиями y на интервале [x1,x2], с использованием метода Рунге — Кутты с постоянным шагом. Параметр intvls задает число строк матрицы результатов.
x := [10; 5]
D(t, x) := [x[0]*(ε[1] - γ[1]*x[1]); -x[1]*(ε[2] - γ[2]*x[0])]
Z := rkfixed(x, 0, tmax, N, D)
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ε1 := 2
ε2 := 0.02
γ1 := 0.01
γ2 := 0.001
tmax := 20
N := 3000
# Особая точка:
X1A := ε1/γ1
X0A := ε2/γ2
D(t, x) := [x[0]*(ε1 - γ1*x[1]); -x[1]*(ε2 - γ2*x[0])]
x := [100; 30]
X0V := [X0A, X1A]
X0A = 20
X1A = 200
Z := rkfixed(x, 0, tmax, N, D)
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n := 0 .. N
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tmax := 300
Z := rkfixed(x, 0, tmax, N, D)
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E := [2; 0.02]
G := [0.01; 0.001]
tmax := 150
N := 3000
# Особая точкая:
x := [100; 200]
D(t, x) := [x[0]*(E[0] - G[0]*x[1]); -x[1]*(E[1] - G[1]*x[0])]
X1A := ε1/γ1
X0A := ε2/γ2
Z := rkfixed(x, 0, tmax, N, D)
X0V := [X0A, X1A]
X0A = 20
X1A = 200
X0V := [X0A, X1A]
X0V[0, 0] = 20
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N := 1000
e := [2; 0.02]
g := [0.0; 0.0]
tmax := 100
c := [0.001; 0.001]
x := [100; 30]
D(t, x) := [x[0]*(e[0] - g[0]*x[1] - c[0]*x[0]); -x[1]*(e[1] - g[1]*x[0] + c[1]*x[1])]
Z := rkfixed(x, 0, tmax, N, D)
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ε1 := 2
ε2 := 0.02
γ1 := 0.01
γ2 := 0.001
tmax := 20
c1 := 0.001
c2 := 0.001
N := 3000
# Особая точка:
X1A := (ε1*γ2 - c1*ε2)/(γ1*γ2 + c1*c2)
X0A := (ε1 - γ1*X1A)/c1
D(t, x) := [x[0]*(ε1 - γ1*x[1] - c1*x[0]); -x[1]*(ε2 - γ2*x[0] + c2*x[1])]
x := [100; 30]
X0A = 200
X0V := [X0A, X1A]
X1A = 180
Z := rkfixed(x, 0, tmax, N, D)
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tmax := 300
Z := rkfixed(x, 0, tmax, N, D)
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