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X[1] := 1
X[2] := 9
X[3] := 5
Y[1] := 1
Y[2] := 1
Y[3] := 9
x[0] := 0
y[0] := 0
N := 50000
n := (1 .. N)
kub[n] := floor(rnd(3)) + 1
x[n] := (x[n - 1] + X[kub[n]])/2
y[n] := (y[n - 1] + Y[kub[n]])/2
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Dc := ln(3)/ln(2)
Dc = 1.58496
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N := 10^5
n := 0 .. N
k := 6
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β := π/k
α := 2*β*(trunc(k/4) + 1)
α*180*π^-1 = 120
β*180*π^-1 = 30
(α - β)*180*π^-1 = 90
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r := 1 + sin(α - β)/sin(β)
r = 3
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R := 1
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D := ln(k)*ln(r)^-1
D = 1.63093
n := 5 .. N
z[5] := 0
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v := e^(1i*2*π*k^-1)
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F(z, j) := (z + 1i*v^j*(r - 1)*R)/r
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z[n + 1] := F(z[n], trunc(rnd(k)))
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s := 1
z[n] := 1i*z[n]^s
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