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a := 0.9
b := 11
a*b = 9.9
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x1 := 0
x2 := 1.0
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M := 11
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N := 5000
i := 0 .. N + 1
x[i] := (x2 - x1)/N*i
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f[i] := sum(a^k*cos(b^k*π*x[i]), k = 0 .. M)
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Lr :=
    Δ ← 20
    for j ∈ 1 .. Δ
        m ← trunc(N/j)
        Δx[j] ← (x2 - x1)/N*j
        r ← sqrt((f[N] - f[m*j])^2 + (x[N] - x[m*j])^2)
        L[j] ← sum(sqrt((f[n*j] - f[(n - 1)*j])^2 + Δx[j]^2) + r, n = 1 .. m)
        Λ[j] ← log(L[j])
        ΔX[j] ← log(Δx[j])
    [ΔX; Λ]
F(x) := sum(a^k*cos(b^k*π*x), k = 0 .. M)
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y(xx) := line(Lr[0], Lr[1])[0] + line(Lr[0], Lr[1])[1]*xx
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β := line(Lr[0], Lr[1])[1]
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D := 1 - β
D = 2.0263
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x := -4, -3.9 .. -2
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b := 1.5
d := 1.8
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x1 := 0
x2 := 0.5
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M := 50
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N := 5000
i := 0 .. N + 1
x[i] := (x2 - x1)/N*i
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f[i] := sum((1 - cos(b^k*x[i]))/b^((2 - d)*k), k = -M .. M)
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F(x) := sum((1 - cos(b^k*x))/b^((2 - d)*k), k = -M .. M)
Lr :=
    Δ ← 20
    for j ∈ 1 .. Δ
        m ← trunc(N/j)
        Δx[j] ← (x2 - x1)/N*j
        r ← sqrt((f[N] - f[m*j])^2 + (x[N] - x[m*j])^2)
        L[j] ← sum(sqrt((f[n*j] - f[(n - 1)*j])^2 + Δx[j]^2) + r, n = 1 .. m)
        Λ[j] ← log(L[j])
        ΔX[j] ← log(Δx[j])
    [ΔX; Λ]
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y(xx) := line(Lr[0], Lr[1])[0] + line(Lr[0], Lr[1])[1]*xx
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β := line(Lr[0], Lr[1])[1]
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D := 1 - β
D = 1.80877
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x := -4, -3.9 .. -2
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