# ОСОБЫЕ ТОЧКИ
# N - Число точек (не считая начальной точки), в которых ищется приближенное решение. При помощи этого аргумента определяется число строк (1 + N) в матрице, возвращаемой функцией rkfixed.
M := 10^4
# ОСОБАЯ ТОЧКА ТИПА ЦЕНТР
ω := 0.2
ν := 0.0
t0 := 0
t1 := 50
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v := [1, 0, 0; 0, -0.5, 0.3]
cols(v) = 3
D(t, x) := [x[1]; -(ω^2*x[0]) - 2*ν*x[1]]
last(transpose(v)[:, 1]) = 2
U :=
    Z1 ← rkfixed(v[:, 0], t0, t1, M, D)
    for k ∈ 1 .. cols(v) - 1
        Z2 ← rkfixed(v[:, k], t0, t1, M, D)
        Z1 ← stack(Z1, Z2)
    Z1
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