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m := 12
2^m = 4096
N := 2^m - 1
N = 4095
ω0 := 2.0
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v0 := [-10, -10, 10, 10, -10, 10; 10, 2.5, -2.5, -5, 5, -10]
t0 := 0
t1 := 50
p := -10
q := 10
Hs := ω0^2
Hs = 4
H := p^2/2 - ω0^2*cos(q)
D0(t, x) := [x[1]; -ω0^2*sin(x[0])]
H = 53.3563
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U0 :=
    Z1 ← rkfixed(v0[:, 0], t0, t1, N, D0)
    for k ∈ 1 .. cols(v0) - 1
        Z2 ← rkfixed(v0[:, k], t0, t1, N, D0)
        Z1 ← stack(Z1, Z2)
    Z1
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H = 53.3563
Hs = 4
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# Зависимость периода вращательного движения от величины модуля полного эллиптического интеграла 1-го рода
K1(k) := integral(1/sqrt(1 - (1/k*sin(φ))^2), φ = 0 .. π/2)
T(k) := 4*K1(k)/(ω0*k)
k := 1, 1.01 .. 100
ω0 = 2
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T(100) = 0.0314167
ω0*T(100)/(2*π) = 0.0100003
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x0 := 0
p(x) := 2*ω0/cosh(ω0*(x - x0))
q(x) := 4*atan(exp(ω0*(x - x0))) - π
x := -10, -9.99 .. 100
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submatrix(□, □, □, □, □)
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v2 := [-2*π, 0, 2*π, -2*π, 0, 2*π, -2*π, 0, 2*π; 1.5, 1.5, 1.5, 0.7, 0.7, 0.7, -1, -1, -1]
D2(t, x) := [x[1]; -ω0^2*sin(x[0])]
t0 := 0
t1 := 50
U2 :=
    Z1 ← rkfixed(v2[:, 0], t0, t1, N, D2)
    for k ∈ 1 .. cols(v2) - 1
        Z2 ← rkfixed(v2[:, k], t0, t1, N, D2)
        Z1 ← stack(Z1, Z2)
    Z1
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# Зависимость периода колебаний от величины модуля полного эллиптического интеграла 1-го рода
K(k) := integral(1/sqrt(1 - (k*sin(φ))^2), φ = 0 .. π/2)
T(k) := 4*K(k)/ω0
k := 0, 0.01 .. 1
ω0 = 2
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x0 := 0
q(x) := 4*atan(exp(ω0*(x - x0))) - π
p(x) := 2*ω0/cosh(ω0*(x - x0))
q(10) = 3.14159
v := [
    -10, -10, -2*π, 0, 2*π, -2*π, 0, 2*π, -2*π, 0, 2*π, q(1), -q(1), q(1) - 4*π, 10, 10;
    5, 3, 1.5, 1.5, 1.5, 0.7, 0.7, 0.7, -1, -1, -1, p(1), p(1), p(1), -2, -4
]
p(10) = 1.64892e-8
D(t, x) := [x[1]; -ω0^2*sin(x[0])]
t0 := 0
t1 := 100
U :=
    Z1 ← rkfixed(v[:, 0], t0, t1, N, D)
    for k ∈ 1 .. cols(v) - 1
        Z2 ← rkfixed(v[:, k], t0, t1, N, D)
        Z1 ← stack(Z1, Z2)
    Z1
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