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λ := -0.5
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λ0 := -0.5
v := [0.1, 2.0; 0.0, 0.0]
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a01 := 0.1
a02 := 0.8
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ast := 0
D(t, x) := [x[1]; -x[0] + (λ - x[0]^2)*x[1]]
a1(t) := sqrt(λ0/(1 - (1 - λ0/a01^2)*exp(-λ0*t)))
a2(t) := sqrt(λ0/(1 - (1 - λ0/a02^2)*exp(-λ0*t)))
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t := 0, 0.01 .. 15
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t0 := 0.2
t1 := 60
M := 2000
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U :=
    Z1 ← rkfixed(v[:, 0], t0, t1, M, D)
    for k ∈ 1 .. last(transpose(v)[:, 1])
        Z2 ← rkfixed(v[:, k], t0, t1, M, D)
        Z1 ← stack(Z1, Z2)
    Z1
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λ0 := 0.5
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a01 := 0.6
a02 := 0.8
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ast := sqrt(λ0)
a1(t) := sqrt(λ0/(1 - (1 - λ0/a01^2)*exp(-λ0*t)))
a2(t) := sqrt(λ0/(1 - (1 - λ0/a02^2)*exp(-λ0*t)))
t := 0, 0.01 .. 15
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λ := 0.0
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v := [0.1, 2.0; 0.0, 0.0]
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D(t, x) := [x[1]; -x[0] + (λ - x[0]^2)*x[1]]
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t0 := 0.2
t1 := 60
M := 2000
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U :=
    Z1 ← rkfixed(v[:, 0], t0, t1, M, D)
    for k ∈ 1 .. last(transpose(v)[:, 1])
        Z2 ← rkfixed(v[:, k], t0, t1, M, D)
        Z1 ← stack(Z1, Z2)
    Z1
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λ := 0.5
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v := [0.1, 2.0; 0.0, 0.0]
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D(t, x) := [x[1]; -x[0] + (λ - x[0]^2)*x[1]]
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t0 := 0.2
t1 := 60
M := 2000
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U :=
    Z1 ← rkfixed(v[:, 0], t0, t1, M, D)
    for k ∈ 1 .. last(transpose(v)[:, 1])
        Z2 ← rkfixed(v[:, k], t0, t1, M, D)
        Z1 ← stack(Z1, Z2)
    Z1
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