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ORIGIN := 1
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t1 := 0
t2 := 1000
N := 50000
σ := 10
b := 8/3
r := 0.5
O := [0, sqrt(r - 1), -sqrt(r - 1); 0, sqrt(r - 1), -sqrt(r - 1); 0, r - 1, r - 1]
v := [-0.01, 0.01; -0.01, 0.01; 1, 1]
O[:, 1] = [0; 0; 0]
O[:, 2] = [0.707107i; 0.707107i; -0.5]
O[:, 3] = [-0.707107i; -0.707107i; -0.5]
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F(t, y) := [σ*(y[2] - y[1]); y[1]*(r - y[3]) - y[2]; y[1]*y[2] - b*y[3]]
U :=
    Z1 ← rkfixed(v[:, 1], t1, t2, N, F)
    for k ∈ 1 .. cols(v)
        Z2 ← rkfixed(v[:, k], t1, t2, N, F)
        Z1 ← stack(Z1, Z2)
    Z1
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# [component: inputs (U[:, 2], U[:, 3], U[:, 4])]
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t1 := 0
t2 := 1000
N := 50000
σ := 10
b := 8/3
r := 5
O := [0, sqrt(r - 1), -sqrt(r - 1); 0, sqrt(r - 1), -sqrt(r - 1); 0, r - 1, r - 1]
v := [-0.01, 0.01; -0.01, 0.01; 1, 1]
O[:, 1] = [0; 0; 0]
O[:, 2] = [2; 2; 4]
O[:, 3] = [-2; -2; 4]
F(t, y) := [σ*(y[2] - y[1]); y[1]*(r - y[3]) - y[2]; y[1]*y[2] - b*y[3]]
U :=
    Z1 ← rkfixed(v[:, 1], t1, t2, N, F)
    for k ∈ 1 .. cols(v)
        Z2 ← rkfixed(v[:, k], t1, t2, N, F)
        Z1 ← stack(Z1, Z2)
    Z1
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# [component: inputs (U[:, 2], U[:, 3], U[:, 4])]
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t1 := 0
t2 := 1000
N := 50000
σ := 10
b := 8/3
r := 13.927
O := [0, sqrt(r - 1), -sqrt(r - 1); 0, sqrt(r - 1), -sqrt(r - 1); 0, r - 1, r - 1]
v := [-0.01, 0.01; -0.01, 0.01; 1, 1]
O[:, 1] = [0; 0; 0]
O[:, 2] = [3.59541; 3.59541; 12.927]
O[:, 3] = [-3.59541; -3.59541; 12.927]
F(t, y) := [σ*(y[2] - y[1]); y[1]*(r - y[3]) - y[2]; y[1]*y[2] - b*y[3]]
U :=
    Z1 ← rkfixed(v[:, 1], t1, t2, N, F)
    for k ∈ 1 .. cols(v)
        Z2 ← rkfixed(v[:, k], t1, t2, N, F)
        Z1 ← stack(Z1, Z2)
    Z1
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# [component: inputs (U[:, 2], U[:, 3], U[:, 4])]
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t1 := 0
t2 := 100
N := 5000
σ := 10
b := 8/3
r := 20
O := [0, sqrt(r - 1), -sqrt(r - 1); 0, sqrt(r - 1), -sqrt(r - 1); 0, r - 1, r - 1]
v := [-0.01, 0.01; -0.01, 0.01; 1, 1]
O[:, 1] = [0; 0; 0]
O[:, 2] = [4.3589; 4.3589; 19]
O[:, 3] = [-4.3589; -4.3589; 19]
F(t, y) := [σ*(y[2] - y[1]); y[1]*(r - y[3]) - y[2]; y[1]*y[2] - b*y[3]]
U :=
    Z1 ← rkfixed(v[:, 1], t1, t2, N, F)
    for k ∈ 1 .. cols(v)
        Z2 ← rkfixed(v[:, k], t1, t2, N, F)
        Z1 ← stack(Z1, Z2)
    Z1
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# [component: inputs (U[:, 2], U[:, 3], U[:, 4])]
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t1 := 0
t2 := 100
N := 1200
σ := 10
b := 8/3
r := 24.5
O := [0, sqrt(r - 1), -sqrt(r - 1); 0, sqrt(r - 1), -sqrt(r - 1); 0, r - 1, r - 1]
v := [-0.01, 0.01, 4.8, -4.8; -0.01, 0.01, 4.8, -4.8; 1, 1, 23.5, 23.5]
O[:, 1] = [0; 0; 0]
O[:, 2] = [4.84768; 4.84768; 23.5]
O[:, 3] = [-4.84768; -4.84768; 23.5]
F(t, y) := [σ*(y[2] - y[1]); y[1]*(r - y[3]) - y[2]; y[1]*y[2] - b*y[3]]
U :=
    Z1 ← rkfixed(v[:, 1], t1, t2, N, F)
    for k ∈ 1 .. cols(v)
        Z2 ← rkfixed(v[:, k], t1, t2, N, F)
        Z1 ← stack(Z1, Z2)
    Z1
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# [component: inputs (U[:, 2], U[:, 3], U[:, 4])]
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t1 := 0
t2 := 100
N := 50000
σ := 10
b := 8/3
r := 28
O := [0, sqrt(r - 1), -sqrt(r - 1); 0, sqrt(r - 1), -sqrt(r - 1); 0, r - 1, r - 1]
F(t, y) := [σ*(y[2] - y[1]); y[1]*(r - y[3]) - y[2]; y[1]*y[2] - b*y[3]]
O[:, 1] = [0; 0; 0]
O[:, 2] = [5.19615; 5.19615; 27]
O[:, 3] = [-5.19615; -5.19615; 27]
y := [0.0; 0.01; 0.1]
Z := rkfixed(y, t1, t2, N, F)
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# [component: inputs (Z[:, 2], Z[:, 3], Z[:, 4])]
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