1.*Стационар
y(x) := 0
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2.*Равномерное_движение
v := 5
x_0 := 0
x(t) := v*t + x_0
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3.*Степенной_рост
x[0] := 0
a := 2
x(t) := a*t^2/2 + x[0]
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4.*Экспоненциальный_рост
x_0 := 1
γ := 1
x(t) := x_0*e^(γ*t)
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5.*Гиперболический*рост
α := 1
t_0 := 1
x(t) := x_0/(1 - α*x_0*(t - t_0))
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# 6. Колебательный
A := 1
B := 1
ν := 0.1
ω := 2*π*ν
x(t) := A*cos(ω*t) + B*sin(ω*t)
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