ε_2 := 10
ε_1 := 10
N_x0 := 1
N_0 := 1
N_x(t) := N_x0*exp(-ε_2*t)
N_k(t) := N_0*exp(ε_1*t)
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# Задача о львах и антилопах:
L_0 := 30
A_0 := 100
ε_2 := 0.02
ε_1 := 2
γ_2 := 0.001
γ_1 := 0.01
L(t) := L_0*e^(-ε_2*t)
A(t) := A_0*e^(ε_1*t)
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L_0 := 50
A_0 := 200
ε_2 := 0.006
ε_1 := 0.002
γ_2 := 0.001
γ_1 := 0.001
L(t) := L_0*e^(-ε_2*t)
A(t) := A_0*e^(ε_1*t)
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