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m := 12
2^m = 4096
N := 2^m - 1
N = 4095
ω0 := 2.0
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x0 := 0
p(x) := 2*ω0/cosh(ω0*(x - x0))
q(x) := 4*atan(exp(ω0*(x - x0))) - π
x := -10, -9.99 .. 100
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